units		metal
boundary	p p p
atom_style	atomic
read_data	struct.lammps

pair_style      airebo 3.0
pair_coeff      * * CH.airebo C H

mass	1	12.0
mass	2	1.0

group		fixPosH id <> 1 120
group		fixPosL id <> 121 239
group		optPos  id <> 240 1000
fix             0       fixPosH setforce NULL 0.0 NULL
fix             1       fixPosH aveforce 0.0 0.0 0.0
fix		2	fixPosL setforce 0.0 0.0 0.0
fix 		3	optPos	setforce NULL 0.0 NULL

neighbor        0.2 bin
neigh_modify	every 1 delay 0 check yes

timestep	0.002
thermo 		1
thermo_style    custom step  pe etotal lx ly lz

dump		1 all xyz 10000000 dump.atom
dump_modify	1 format "%d  %20.15g  %20.15g  %20.15g"
#fix 		8 all box/relax iso 0.0
min_style	cg
minimize	1.0e-12 1.0e-12 10 10
min_modify line quadratic

clear
